# Зададим число нейронов в каждом из слоёв сети
N := transpose([1, 200, 50, 1])
# Определим функции активации
Sigmoid(x) := 1/(1 + e^(-x))
dSigmoid(u) := u*(1 - u)
Liniar(x) := x
dLinear(u) := 1
# Определим вектор функций активации для каждого из слоёв
Activation := [Sigmoid; Sigmoid; Liniar]
dActivation := [dSigmoid; dSigmoid; dLinear]
# Определим метод, генерирующий матрицы передачи каждого слоя
GetW(N) :=
    layers ← rows(N) - 1
    for i ∈ 0 .. layers - 1
        W[i] ← matrix(N[i + 1], N[i], w(n, input) ← rnd(1) - 0.5)
    W
tg(x) :=
    -1 if x < -100
    1 if x > 100
    otherwise
        ex ← e^(2*x)
        (ex - 1)/(ex + 1)
dtg(u) := 1 - u*u
# Расчитаем массив матриц передачи слоёв, заполненных случайными числами
W := GetW(N)
# Определим метод генерации смещений нейронов в каждом из слоёв
GetOffsets(N) :=
    layers ← rows(N) - 1
    for i ∈ 0 .. layers - 1
        Offset[i] ← matrix(N[i + 1], 1, offset(n, j) ← 1)
    Offset
# Расчитаем массив коэффициентов смещения для каждого из слоёв
Offsets := GetOffsets(N) = [
    [
        1; 1; 1; 1; 1; 1; 1; 1; 1; 1
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    ];
    [
        1; 1; 1; 1; 1; 1; 1; 1; 1; 1
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    ];
    [1]
]
# Сохраним структуру сети в файл
SaveNetwork(W, file) :=
    layers ← rows(W)
    for i ∈ 0 .. layers - 1
        layer_name ← concat(file, num2str(i), ".csv")
        WRITECSV(W[i], layer_name)
    layers
SaveNetwork(W, "network") = 3
# Определим функцию для чтения структуры нейронной сети из файла
ReadNetwork(N, file) :=
    layers ← rows(N) - 1
    for i ∈ 0 .. layers - 1
        layer_name ← concat(file, num2str(i), ".csv")
        W[i] ← READCSV(layer_name)
    W
W =  # no stored result
# Проверим работоспособность метода чтения структуры сети из файла
W := ReadNetwork(N, "network")
W[2] = [
    -0.402113, -0.0341243, -0.264737, -0.388581, -0.451506, -0.156207, -0.195813, 0.129399, -0.194079, 0.158978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]
W[1] =  # no stored result
W[0] = [
    -0.362571; 0.30702; -0.170724; 0.0748658; -0.0680861; 0.110104; -0.300568; 0.0797992; 0.05444; -0.442465
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]
# Определим вход сети в виде вектора из одного элемента
Input := [30*deg]
# Определим значение, которое должно быть получено на выходе нейронной сети
ExpectedOutput := [sin(Input[0])] = [0.5]
# Зададим нулевым элементом массива выходов сети значение на её входе
Output[0] := Input = [0.523599]
# Расчитаем значение на выходе первого слоя и положим его в первый элемент массива выходов сети
Output[1] :=
    u ← W[0]*Output[0] + Offsets[0]
    Activation[0](u)
    = [
        0.692143; 0.76147; 0.713125; 0.738696; 0.723992; 0.742241; 0.699017; 0.739194; 0.736626; 0.683159
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    ]  # Аналогичное проделаем для второго и третьего слоя
Output[2] :=
    u ← W[1]*Output[1] + Offsets[1]
    Activation[1](u)
    = [
        0.563847; 0.980152; 0.861696; 0.837342; 0.08692; 0.952983; 0.912122; 0.525984; 0.445637; 0.718773
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    ]
Output[3] :=
    u ← W[2]*Output[2] + Offsets[2]
    Activation[2](u)
    = [0.400035]
# Значения в каждом слое на входе функции активации
U[1] := W[0]*Output[0] + Offsets[0] = [
    0.810158; 1.16076; 0.910609; 1.0392; 0.96435; 1.05765; 0.842623; 1.04178; 1.0285; 0.768326
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]
U[2] := W[1]*Output[1] + Offsets[1] = [
    0.25679; 3.89962; 1.82945; 1.63858; -2.35183; 3.0091; 2.33982; 0.104029; -0.218314; 0.938383
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]
U[3] := W[2]*Output[2] + Offsets[2] = [0.400035]
# Значение, полученное на выходе сети
U[3][0] = 0.400035
# а должно быть
ExpectedOutput[0] = 0.5
# Непонятное ...
Summ(S, V) :=
    n ← rows(V)
    R[0, 0] ← 1
    for i ∈ 0 .. n - 1
        I ← S[0, i]*V[i, 0]
        R[i + 1, 0] ← R[i, 0] + I
        R[i + 1, 1] ← I
        R[i + 1, 2] ← S[0, i]
        R[i + 1, 3] ← V[i, 0]
    R
Summ(W[2], Output[2])[N[2], 0] = 0.400035
M(A, B) :=
    N ← rows(A)
    for i ∈ 0 .. N - 1
        R[i] ← A[i]*B[i]
    R
# Алгоритм обратного распространения ошибки
# Зададим коэффициент скорости обучения
η := 0.2
# Расчитаем ошибку на выходном слое как разницу между ожидаемым и полученным значениями
Error[3] := ExpectedOutput - Output[3] = [0.0999653]
cols(Error[3]) = 1
Error[3] := Error[3]*dActivation[2](Output[3]) = [0.0999653]
cols(Error[3]) = 1
# Ошибка на втором слое
Error[2] := Error[3]*W[2] = [
    -0.0401973, -0.00341124, -0.0264645, -0.0388446, -0.045135, -0.0156153, -0.0195745, 0.0129354, -0.0194012, 0.0158922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]
cols(Error[2]) = 50
cols(Error[2]) = 50
Error[2] := Error[2]*dActivation[1](Output[2]) = [
    -0.209783, -0.0178027, -0.138114, -0.202724, -0.235552, -0.0814935, -0.102156, 0.0675076, -0.101252, 0.0829389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]
# Ошибка на первом слое
Error[1] := Error[2]*W[1] = [
    0.528943, 0.251404, -0.23746, 0.0124096, 0.0947441, -0.0753692, -0.0165303, -0.355737, -0.0737549, -0.322373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]
cols(Error[1]) = 200
Error[1] := Error[1]*dActivation[0](Output[1]) = [
    20.5399, 9.76253, -9.22105, 0.481889, 3.6791, -2.92674, -0.641905, -13.814, -2.86405, -12.5184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]
cols(Error[1]) = 200
# Ошибка на входе сети
Error[0] := Error[1]*W[0] = 65.3165
Error[0] := Error[0]*dtg(Output[0]) = 47.4096
# Определим на сколько необходимо изменить коэффициенты передачи для каждого слоя
ΔW[2] := transpose(η*Output[2]*Error[3]) = [
    0.011273, 0.0195962, 0.0172279, 0.016741, 0.0017378, 0.0190531, 0.0182361, 0.010516, 0.00890965, 0.0143705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]
ΔW[1] := transpose(η*Output[1]*Error[2])
ΔW[0] := transpose(η*Output[0]*Error[1]) = [
    2.15093; 1.02233; -0.965626; 0.0504633; 0.385274; -0.306487; -0.0672201; -1.4466; -0.299923; -1.31092
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]
max(Error[1]) = 27.1708
min(Error[1]) = -26.3721
W[0] = [
    -0.362571; 0.30702; -0.170724; 0.0748658; -0.0680861; 0.110104; -0.300568; 0.0797992; 0.05444; -0.442465
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]
# Изменим коэффициенты передачи слоёв
W := W + ΔW
Output[1] :=
    u ← W[0]*Output[0] + Offsets[0]
    vectorize(Activation[0](u))
    = [
        0.873954; 0.845018; 0.59989; 0.743763; 0.762436; 0.710368; 0.691561; 0.570611; 0.705051; 0.520471
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    ]
Output[2] :=
    u ← W[1]*Output[1] + Offsets[1]
    vectorize(Activation[1](u))
    = [
        0.00302166; 0.96783; 0.0796398; 0.0171977; 0.000137992; 0.805161; 0.341381; 0.899462; 0.040267; 0.946017
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    ]
Output[3] :=
    u ← W[2]*Output[2] + Offsets[2]
    vectorize(Activation[2](u))
    = [4.52171]
# Значение на выходе сети составило
Output[3][0] = 4.52171
# а должно быть
ExpectedOutput[0] = 0.5
ExpectedOutput - Output[3] = [-4.02171]
Error[3] := ExpectedOutput - Output[3] = [-4.02171]
cols(Error[3]) = 1
Error[3] := Error[3]*dActivation[2](Output[3]) = [-4.02171]
cols(Error[3]) = 1
Error[2] := Error[3]*W[2] = [
    1.57184, 0.0584276, 0.99541, 1.49543, 1.80884, 0.551592, 0.714164, -0.562696, 0.744697, -0.697155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]
cols(Error[2]) = 50
cols(Error[2]) = 50
Error[2] := Error[2]*dActivation[1](Output[2]) = [
    5.32005, 0.197753, 3.36905, 5.06142, 6.12217, 1.86691, 2.41715, -1.90449, 2.52049, -2.35958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]
Error[1] := Error[2]*W[1] = [
    -17.7313, -10.9089, 2.81293, -3.47045, -5.52431, -1.25018, -3.0575, 5.4258, -2.02276, 4.98622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]
cols(Error[1]) = 200
Error[1] := Error[1]*dActivation[0](Output[1]) = [
    -663.104, -407.962, 105.196, -129.785, -206.594, -46.7532, -114.342, 202.91, -75.6457, 186.471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]
cols(Error[1]) = 200
Error[0] := Error[1]*W[0]  # disabled
Error[0] := Error[0]*dtg(Output[0])  # disabled
ΔW[2] := transpose(η*Output[2]*Error[3]) = [
    -0.00243044, -0.778466, -0.0640576, -0.0138328, -0.000110992, -0.647625, -0.274587, -0.723475, -0.0323884, -0.760921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]
ΔW[1] := transpose(η*Output[1]*Error[2])
max(Error[1]) = 528.555
min(Error[1]) = -820.02
W[0] = [
    1.78836; 1.32935; -1.13635; 0.125329; 0.317188; -0.196383; -0.367788; -1.3668; -0.245483; -1.75339
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]
ΔW[0] := transpose(η*Output[0]*Error[1]) = [
    -69.44; -42.7217; 11.0161; -13.5911; -21.6345; -4.89599; -11.9739; 21.2487; -7.9216; 19.5272
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]
W := W + ΔW
Output[1] :=
    u ← W[0]*Output[0] + 0
    vectorize(Activation[0](u))
    = [
        0; 3.86854e-10; 0.994365; 0.000866087; 1.42078e-5; 0.0649878; 0.00155911; 0.99997; 0.0137039; 0.999909
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    ]
Output[2] :=
    u ← W[1]*Output[1] + 0
    vectorize(Activation[1](u))
    = [
        1; 0.898298; 1; 1; 1; 0.999995; 1; 1.32996e-7; 1; 7.60147e-8
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    ]
Output[3] :=
    u ← W[2]*Output[2] + 0
    vectorize(Activation[2](u))
    = -12.9367
Error[3] := ExpectedOutput - Output[3] = [13.4367]
cols(Error[3]) = 1
Error[3] := Error[3]*dActivation[2](Output[3]) = [13.4367]
cols(Error[3]) = 1
Error[2] := Error[3]*W[2] = [
    -5.28427, -10.6552, -4.18644, -5.18218, -6.04491, -10.5449, -6.07561, -7.84114, -2.92327, -7.89505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]
cols(Error[2]) = 50
cols(Error[2]) = 50
Error[2] := Error[2]*dActivation[1](Output[2]) = [
    -1.78438, -3.59804, -1.41367, -1.74991, -2.04123, -3.56076, -2.0516, -2.64778, -0.987122, -2.66599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]
Error[1] := Error[2]*W[1] = [
    -12.3468, -10.0467, -2.65029, 0.617863, 1.97937, -3.87073, -7.2503, -6.23435, -6.7661, -3.71216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]
cols(Error[1]) = 200
Error[1] := Error[1]*dActivation[0](Output[1]) = [
    -49.9926, -40.6796, -10.7312, 2.50176, 8.01457, -15.6728, -29.3568, -25.2432, -27.3963, -15.0307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]
cols(Error[1]) = 200
Error[0] := Error[1]*W[0]  # disabled
Error[0] := Error[0]*dtg(Output[0])  # disabled
ΔW[2] := transpose(η*Output[2]*Error[3]) = [
    2.68734, 2.41404, 2.68734, 2.68734, 2.68734, 2.68733, 2.68734, 3.57407e-7, 2.68734, 2.04278e-7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]
ΔW[1] := transpose(η*Output[1]*Error[2])
max(Error[1]) = 33.7603
min(Error[1]) = -69.1684
W[0] = [
    -67.6517; -41.3923; 9.87975; -13.4658; -21.3173; -5.09237; -12.3417; 19.8819; -8.16709; 17.7738
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]
ΔW[0] := transpose(η*Output[0]*Error[1]) = [
    -5.23522; -4.25996; -1.12376; 0.261983; 0.839284; -1.64125; -3.07424; -2.64346; -2.86893; -1.57401
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]
W := W + ΔW
Output[1] :=
    u ← W[0]*Output[0] + 0
    vectorize(Activation[0](u))
    = [
        0; 4.15766e-11; 0.989896; 0.0009933; 2.20482e-5; 0.0285893; 0.00031214; 0.99988; 0.00308398; 0.999793
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    ]
Output[2] :=
    u ← W[1]*Output[1] + 0
    vectorize(Activation[1](u))
    = [
        1; 0; 0.999628; 1; 1; 1.12089e-13; 0.00233798; 0; 0.999205; 0
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    ]
Output[3] :=
    u ← W[2]*Output[2] + 0
    vectorize(Activation[2](u))
    = 33.6114
Error[3] := ExpectedOutput - Output[3] = [-33.1114]
cols(Error[3]) = 1
Error[3] := Error[3]*dActivation[2](Output[3]) = [-33.1114]
cols(Error[3]) = 1
Error[2] := Error[3]*W[2] = [
    -75.96, -53.675, -78.6653, -76.2115, -74.0856, -62.9962, -74.0099, 19.3225, -81.7781, 19.4553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]
cols(Error[2]) = 50
cols(Error[2]) = 50
Error[2] := Error[2]*dActivation[1](Output[2]) = [
    -23.9131, -16.8975, -24.7648, -23.9923, -23.323, -19.832, -23.2992, 6.08295, -25.7447, 6.12478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]
Error[1] := Error[2]*W[1] = [
    -367.467, -358.634, -80.1019, -312.239, -321.618, -267.743, -304.645, -67.3898, -289.873, -75.1121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]
cols(Error[1]) = 200
Error[1] := Error[1]*dActivation[0](Output[1]) = [
    -1162.68, -1134.73, -253.446, -987.938, -1017.61, -847.152, -963.909, -213.224, -917.172, -237.658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]
cols(Error[1]) = 200
Error[0] := Error[1]*W[0]  # disabled
Error[0] := Error[0]*dtg(Output[0])  # disabled
ΔW[2] := transpose(η*Output[2]*Error[3]) = [
    -6.62228, 0, -6.61981, -6.62228, -6.62228, -7.42284e-13, -0.0154828, 0, -6.61701, 0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]
ΔW[1] := transpose(η*Output[1]*Error[2])
max(Error[1]) = 23.3238
min(Error[1]) = -1183.49
W[0] = [
    -72.8869; -45.6523; 8.75599; -13.2038; -20.478; -6.73362; -15.4159; 17.2384; -11.036; 16.1998
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]
ΔW[0] := transpose(η*Output[0]*Error[1]) = [
    -121.756; -118.829; -26.5408; -103.457; -106.564; -88.7135; -100.94; -22.3288; -96.046; -24.8875
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]
W := W + ΔW
Output[1] :=
    u ← W[0]*Output[0] + 0
    vectorize(Activation[0](u))
    = [
        0; 0; 9.03164e-5; 0; 0; 0; 0; 0.0650523; 0; 0.0104683
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    ]
Output[2] :=
    u ← W[1]*Output[1] + 0
    vectorize(Activation[1](u))
    = [
        0; 0; 0; 0; 0; 0; 0; 0.999941; 0; 0.999975
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    ]
Output[3] :=
    u ← W[2]*Output[2] + 0
    vectorize(Activation[2](u))
    = -7.99354
Error[3] := ExpectedOutput - Output[3] = [8.49354]
cols(Error[3]) = 1
Error[3] := Error[3]*dActivation[2](Output[3]) = [8.49354]
cols(Error[3]) = 1
Error[2] := Error[3]*W[2] = [
    -36.7618, 13.7684, -36.0469, -36.6972, -37.2426, 16.1594, 18.8531, -4.95649, -35.2246, -4.99057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]
cols(Error[2]) = 50
cols(Error[2]) = 50
Error[2] := Error[2]*dActivation[1](Output[2]) = [
    -41.5345, 15.5559, -40.7268, -41.4616, -42.0778, 18.2574, 21.3008, -5.59999, -39.7978, -5.6385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]
Error[1] := Error[2]*W[1] = [
    -264.062, -280.068, 1839.46, -218.064, -282.871, -219.272, -224.879, 1774.13, -227.336, 1845.54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]
cols(Error[1]) = 200
Error[1] := Error[1]*dActivation[0](Output[1]) = [
    -203.303, -215.626, 1416.21, -167.889, -217.784, -168.819, -173.136, 1365.91, -175.027, 1420.89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]
cols(Error[1]) = 200
Error[0] := Error[1]*W[0]  # disabled
Error[0] := Error[0]*dtg(Output[0])  # disabled
ΔW[2] := transpose(η*Output[2]*Error[3]) = [
    0, 0, 0, 0, 0, 0, 0, 1.69861, 0, 1.69867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]
ΔW[1] := transpose(η*Output[1]*Error[2])
max(Error[1]) = 1467.68
min(Error[1]) = -281.694
W[0] = [
    -194.643; -164.481; -17.7848; -116.66; -127.042; -95.4471; -116.356; -5.09034; -107.082; -8.68772
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]
ΔW[0] := transpose(η*Output[0]*Error[1]) = [
    -21.2898; -22.5803; 148.305; -17.5813; -22.8062; -17.6786; -18.1307; 143.038; -18.3288; 148.795
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]
W := W + ΔW
Output[1] :=
    u ← W[0]*Output[0] + 0
    vectorize(Activation[0](u))
    = [
        0; 0; 1; 0; 0; 0; 0; 1; 0; 1
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    ]
Output[2] :=
    u ← W[1]*Output[1] + 0
    vectorize(Activation[1](u))
    = [
        0; 0; 0; 0; 0; 0; 0; 0.274195; 0; 0.323659
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    ]
Output[3] :=
    u ← W[2]*Output[2] + 0
    vectorize(Activation[2](u))
    = 3.81723
Error[3] := ExpectedOutput - Output[3] = [-3.31723]
cols(Error[3]) = 1
Error[3] := Error[3]*dActivation[2](Output[3]) = [-3.31723]
cols(Error[3]) = 1
Error[2] := Error[3]*W[2] = [
    14.3576, -5.37737, 14.0784, 14.3324, 14.5454, -6.31121, -7.36325, -3.69887, 13.7573, -3.68576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]
cols(Error[2]) = 50
cols(Error[2]) = 50
Error[2] := Error[2]*dActivation[1](Output[2]) = [
    6.91688, -2.59058, 6.78237, 6.90474, 7.00735, -3.04046, -3.54729, -1.78195, 6.62766, -1.77564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]
Error[1] := Error[2]*W[1] = [
    60.5601, 62.5772, -316.668, 55.2055, 67.0373, 51.7245, 53.5993, -365.361, 54.0236, -327.532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]
cols(Error[1]) = 200
Error[1] := Error[1]*dActivation[0](Output[1]) = [
    0.0450629, 0.0465639, -0.235633, 0.0410786, 0.0498826, 0.0384883, 0.0398833, -0.271866, 0.0401991, -0.243717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]
cols(Error[1]) = 200
Error[0] := Error[1]*W[0]  # disabled
Error[0] := Error[0]*dtg(Output[0])  # disabled
ΔW[2] := transpose(η*Output[2]*Error[3]) = [
    0, 0, 0, 0, 0, 0, 0, -0.181914, 0, -0.21473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]
ΔW[1] := transpose(η*Output[1]*Error[2])
max(Error[1]) = 0.0572868
min(Error[1]) = -0.893832
W[0] = [
    -215.933; -187.062; 130.52; -134.242; -149.848; -113.126; -134.487; 137.947; -125.411; 140.107
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]
ΔW[0] := transpose(η*Output[0]*Error[1]) = [
    0.00471898; 0.00487616; -0.0246755; 0.00430174; 0.00522369; 0.00403049; 0.00417657; -0.0284698; 0.00420964; -0.025522
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]
W := W + ΔW
Output[1] :=
    u ← W[0]*Output[0] + 0
    vectorize(Activation[0](u))
    = [
        0; 0; 1; 0; 0; 0; 0; 1; 0; 1
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    ]
Output[2] :=
    u ← W[1]*Output[1] + 0
    vectorize(Activation[1](u))
    = [
        0; 0; 0; 0; 0; 0; 0; 3.98183e-10; 0; 5.42743e-10
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    ]
Output[3] :=
    u ← W[2]*Output[2] + 0
    vectorize(Activation[2](u))
    = 4.50773e-6
Error[3] := ExpectedOutput - Output[3] = [0.499995]
cols(Error[3]) = 1
Error[3] := Error[3]*dActivation[2](Output[3]) = [0.499995]
cols(Error[3]) = 1
Error[2] := Error[3]*W[2] = [
    -2.16408, 0.810514, -2.122, -2.16028, -2.19239, 0.951268, 1.10984, 0.466563, -2.07359, 0.448178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]
cols(Error[2]) = 50
cols(Error[2]) = 50
Error[2] := Error[2]*dActivation[1](Output[2]) = [
    -2.5113e-5, 9.40557e-6, -2.46246e-5, -2.50689e-5, -2.54414e-5, 1.10389e-5, 1.28791e-5, 5.41421e-6, -2.40629e-5, 5.20086e-6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]
Error[1] := Error[2]*W[1] = [
    -0.000215925, -0.000223403, 0.000573874, -0.000195553, -0.000236359, -0.000183777, -0.000189892, 0.000751651, -0.000192198, 0.000612414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]
cols(Error[1]) = 200
Error[1] := Error[1]*dActivation[0](Output[1]) = [
    -1.60281e-7, -1.65832e-7, 4.25987e-7, -1.45159e-7, -1.75449e-7, -1.36418e-7, -1.40957e-7, 5.57951e-7, -1.42668e-7, 4.54595e-7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]
cols(Error[1]) = 200
Error[0] := Error[1]*W[0]  # disabled
Error[0] := Error[0]*dtg(Output[0])  # disabled
ΔW[2] := transpose(η*Output[2]*Error[3]) = [
    0, 0, 0, 0, 0, 0, 0, 3.98179e-11, 0, 5.42738e-11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]
ΔW[1] := transpose(η*Output[1]*Error[2])
max(Error[1]) = 2.82156e-6
min(Error[1]) = -2.04257e-7
W[0] = [
    -215.928; -187.057; 130.496; -134.237; -149.843; -113.122; -134.483; 137.919; -125.407; 140.082
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]
ΔW[0] := transpose(η*Output[0]*Error[1]) = [
    -1.67846e-8; -1.73659e-8; 4.46092e-8; -1.5201e-8; -1.8373e-8; -1.42856e-8; -1.4761e-8; 5.84285e-8; -1.49402e-8; 4.76051e-8
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]
W := W + ΔW
Output[1] :=
    u ← W[0]*Output[0] + 0
    vectorize(Activation[0](u))
    = [
        0; 0; 1; 0; 0; 0; 0; 1; 0; 1
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    ]
Output[2] :=
    u ← W[1]*Output[1] + 0
    vectorize(Activation[1](u))
    = [
        0; 0; 0; 0; 0; 0; 0; 3.98208e-10; 0; 5.42775e-10
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    ]
Output[3] :=
    u ← W[2]*Output[2] + 0
    vectorize(Activation[2](u))
    = 4.50785e-6
Error[3] := ExpectedOutput - Output[3] = [0.499995]
cols(Error[3]) = 1
Error[3] := Error[3]*dActivation[2](Output[3]) = [0.499995]
cols(Error[3]) = 1
Error[2] := Error[3]*W[2] = [
    -2.16408, 0.810514, -2.122, -2.16028, -2.19239, 0.951268, 1.10984, 0.466563, -2.07359, 0.448178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]
cols(Error[2]) = 50
cols(Error[2]) = 50
Error[2] := Error[2]*dActivation[1](Output[2]) = [
    -2.51136e-5, 9.40582e-6, -2.46253e-5, -2.50695e-5, -2.54421e-5, 1.10392e-5, 1.28794e-5, 5.41435e-6, -2.40635e-5, 5.201e-6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]
Error[1] := Error[2]*W[1] = [
    -0.000215931, -0.000223409, 0.000573891, -0.000195558, -0.000236365, -0.000183782, -0.000189897, 0.000751673, -0.000192203, 0.000612432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]
cols(Error[1]) = 200
Error[1] := Error[1]*dActivation[0](Output[1]) = [
    -1.60285e-7, -1.65837e-7, 4.25999e-7, -1.45163e-7, -1.75454e-7, -1.36421e-7, -1.4096e-7, 5.57967e-7, -1.42672e-7, 4.54609e-7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]
cols(Error[1]) = 200
Error[0] := Error[1]*W[0]  # disabled
Error[0] := Error[0]*dtg(Output[0])  # disabled
ΔW[2] := transpose(η*Output[2]*Error[3]) = [
    0, 0, 0, 0, 0, 0, 0, 3.98204e-11, 0, 5.4277e-11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]
ΔW[1] := transpose(η*Output[1]*Error[2])
max(Error[1]) = 2.82164e-6
min(Error[1]) = -2.04262e-7
W[0] = [
    -215.928; -187.057; 130.496; -134.237; -149.843; -113.122; -134.483; 137.919; -125.407; 140.082
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]
ΔW[0] := transpose(η*Output[0]*Error[1]) = [
    -1.6785e-8; -1.73664e-8; 4.46105e-8; -1.52014e-8; -1.83735e-8; -1.4286e-8; -1.47613e-8; 5.84302e-8; -1.49406e-8; 4.76065e-8
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]
W := W + ΔW
Output[1] :=
    u ← W[0]*Output[0] + 0
    vectorize(Activation[0](u))
    = [
        0; 0; 1; 0; 0; 0; 0; 1; 0; 1
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    ]
Output[2] :=
    u ← W[1]*Output[1] + 0
    vectorize(Activation[1](u))
    = [
        0; 0; 0; 0; 0; 0; 0; 3.98233e-10; 0; 5.42808e-10
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    ]
Output[3] :=
    u ← W[2]*Output[2] + 0
    vectorize(Activation[2](u))
    = 4.50797e-6
